*Heading
** Job name: ThermalStaticAnalysis Model name: Model-1
** Generated by: Abaqus/CAE 2016
*Preprint, echo=NO, model=NO, history=NO, contact=NO
**
** PARTS
**
*Part, name=LargePipe
*End Part
**
**
** ASSEMBLY
**
*Assembly, name=Assembly
**
*Instance, name=LargePipe-1, part=LargePipe
*Node
      1,         9.25,   9.48683262,           0.
      2,           0.,        13.25,         9.25
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*Element, type=S8RT
  1,   1,   8,  98,  43, 362, 363, 364, 365
  2,   8,   9,  99,  98, 366, 367, 368, 363
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*Nset, nset=Set-1, generate
    1,  1037,     1
*Elset, elset=Set-1, generate
   1,  316,    1
** Section: PipeSection
*Shell Section, elset=Set-1, material=PipeMaterial
2.5, 5
*End Instance
**
*Nset, nset=Set-8, instance=LargePipe-1
    2,    3,    7,   17,   18,   19
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*Elset, elset=Set-8, instance=LargePipe-1
  10,  20,  30,  40,  50,  60
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*Nset, nset=Set-9, instance=LargePipe-1
   1,   4,   5,  35,  36,  37
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*Elset, elset=Set-9, instance=LargePipe-1
   1,  11,  21,  31,  41,  51
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*Nset, nset=Set-10, instance=LargePipe-1
   5,   6,  70,  71,  72,  73
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*Elset, elset=Set-10, instance=LargePipe-1
 144, 148, 152, 156, 157, 158
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*Nset, nset=Set-35, instance=LargePipe-1, generate
    1,  1037,     1
*Elset, elset=Set-35, instance=LargePipe-1, generate
   1,  316,    1
*Nset, nset=Set-36, instance=LargePipe-1
   6,   7,  89,  90,  91,  92
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*Elset, elset=Set-36, instance=LargePipe-1
 172, 188, 204, 220, 221, 222, 223, 224, 225, 226
*Nset, nset=Set-37, instance=LargePipe-1
    2,    3,    7,   17,   18,   19
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*Elset, elset=Set-37, instance=LargePipe-1
  10,  20,  30,  40,  50,  60
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*Nset, nset=Set-38, instance=LargePipe-1
   1,   4,   5,  35,  36,  37
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*Elset, elset=Set-38, instance=LargePipe-1
   1,  11,  21,  31,  41,  51
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*Nset, nset=Set-39, instance=LargePipe-1
   5,   6,  70,  71,  72,  73
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*Elset, elset=Set-39, instance=LargePipe-1
 144, 148, 152, 156, 157, 158
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*Elset, elset=_Surf-1_E3, internal, instance=LargePipe-1, generate
  91,  100,    1
*Surface, type=ELEMENT, name=Surf-1
_Surf-1_E3, E3
*Elset, elset=_Surf-2_E3, internal, instance=LargePipe-1, generate
  91,  100,    1
*Surface, type=ELEMENT, name=Surf-2
_Surf-2_E3, E3
*End Assembly
**
** MATERIALS
**
*Material, name=PipeMaterial
*Conductivity
 0.00023,
*Density
 0.0008,
*Elastic
 2.9e+07, 0.3
*Expansion
 7e-06,
** ----------------------------------------------------------------
**
** STEP: StepForThermalAnalysis
**
*Step, name=StepForThermalAnalysis, nlgeom=NO
Step of Thermal Analysis
*Coupled Temperature-displacement, creep=none, steady state
1., 1., 1e-05, 1.
**
** BOUNDARY CONDITIONS
**
** Name: CentralSection Type: Displacement/Rotation
*Boundary
Set-39, 2, 2
Set-39, 4, 4
Set-39, 6, 6
** Name: LongPipeCentralSection Type: Displacement/Rotation
*Boundary
Set-37, 1, 1
Set-37, 5, 5
Set-37, 6, 6
** Name: PipeEntrenceEdge Type: Displacement/Rotation
*Boundary
Set-36, 1, 1
** Name: SmallPipeCentralSection Type: Displacement/Rotation
*Boundary
Set-38, 3, 3
Set-38, 4, 4
Set-38, 5, 5
** Name: SpecifiedTemperatureChange Type: Temperature
*Boundary
Set-35, 11, 11, -60.
**
** OUTPUT REQUESTS
**
*Restart, write, frequency=0
**
** FIELD OUTPUT: F-Output-1
**
*Output, field, variable=PRESELECT
**
** HISTORY OUTPUT: H-Output-1
**
*Output, history, variable=PRESELECT
*End Step
