*Heading
** Job name: DynamicAnalysisStep Model name: Model-1
** Generated by: Abaqus/CAE 2016
*Preprint, echo=NO, model=NO, history=NO, contact=NO
**
** PARTS
**
*Part, name=LargePipe
*End Part
**
**
** ASSEMBLY
**
*Assembly, name=Assembly
**
*Instance, name=LargePipe-1, part=LargePipe
*Node
      1,         9.25,   9.48683262,           0.
      2,           0.,        13.25,         9.25
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*Element, type=S8R
  1,   1,   8,  98,  43, 362, 363, 364, 365
  2,   8,   9,  99,  98, 366, 367, 368, 363
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*Nset, nset=Set-1, generate
    1,  1037,     1
*Elset, elset=Set-1, generate
   1,  316,    1
** Section: PipeSection
*Shell Section, elset=Set-1, material=PipeMaterial
2.5, 5
*End Instance
**
*Nset, nset=Set-8, instance=LargePipe-1
    2,    3,    7,   17,   18,   19
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*Elset, elset=Set-8, instance=LargePipe-1
  10,  20,  30,  40,  50,  60
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*Nset, nset=Set-9, instance=LargePipe-1
   1,   4,   5,  35,  36,  37
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*Elset, elset=Set-9, instance=LargePipe-1
   1,  11,  21,  31,  41,  51
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*Nset, nset=Set-10, instance=LargePipe-1
   5,   6,  70,  71,  72,  73
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*Elset, elset=Set-10, instance=LargePipe-1
 144, 148, 152, 156, 157, 158
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*Nset, nset=Set-35, instance=LargePipe-1
    2,    3,    7,   17,   18,   19
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*Elset, elset=Set-35, instance=LargePipe-1
  10,  20,  30,  40,  50,  60
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*Nset, nset=Set-36, instance=LargePipe-1
   1,   4,   5,  35,  36,  37
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*Elset, elset=Set-36, instance=LargePipe-1
   1,  11,  21,  31,  41,  51
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*Nset, nset=Set-37, instance=LargePipe-1
   5,   6,  70,  71,  72,  73
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*Elset, elset=Set-37, instance=LargePipe-1
 144, 148, 152, 156, 157, 158
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*Elset, elset=_Surf-1_E3, internal, instance=LargePipe-1, generate
  91,  100,    1
*Surface, type=ELEMENT, name=Surf-1
_Surf-1_E3, E3
*Elset, elset=_Surf-2_E3, internal, instance=LargePipe-1, generate
  91,  100,    1
*Surface, type=ELEMENT, name=Surf-2
_Surf-2_E3, E3
*Elset, elset=_Surf-3_E3, internal, instance=LargePipe-1, generate
  91,  100,    1
*Surface, type=ELEMENT, name=Surf-3
_Surf-3_E3, E3
*End Assembly
*Amplitude, name=Amp-1, time=TOTAL TIME
             0.,              0.,          0.0001,              1.,            0.02,              1.
**
** MATERIALS
**
*Material, name=PipeMaterial
*Conductivity
 0.00023,
*Density
 0.0008,
*Elastic
 2.9e+07, 0.3
*Expansion
 7e-06,
** ----------------------------------------------------------------
**
** STEP: StepForDynamicAnalysis
**
*Step, name=StepForDynamicAnalysis, nlgeom=NO, inc=200
Dynamic
*Dynamic,direct,nohaf
0.0001,0.02,
**
** BOUNDARY CONDITIONS
**
** Name: CentralPipe Type: Displacement/Rotation
*Boundary, amplitude=Amp-1
Set-37, 2, 2
Set-37, 4, 4
Set-37, 6, 6
** Name: LongCentralPipe Type: Displacement/Rotation
*Boundary, amplitude=Amp-1
Set-35, 1, 1
Set-35, 5, 5
Set-35, 6, 6
** Name: ShortPipeCentralSection Type: Displacement/Rotation
*Boundary, amplitude=Amp-1
Set-36, 3, 3
Set-36, 4, 4
Set-36, 5, 5
**
** LOADS
**
** Name: AppliedPressure   Type: Shell edge load
*Dsload, amplitude=Amp-1
Surf-3, EDNOR, 55000.
**
** OUTPUT REQUESTS
**
*Restart, write, frequency=0
**
** FIELD OUTPUT: F-Output-1
**
*Output, field, variable=PRESELECT
**
** HISTORY OUTPUT: H-Output-1
**
*Output, history, variable=PRESELECT
*End Step
