*Heading
** Job name: PlateBendingProblem Model name: Model-1
** Generated by: Abaqus/CAE 2016
*Preprint, echo=NO, model=NO, history=NO, contact=NO
**
** PARTS
**
*Part, name=PlateBendingTestCase
*End Part
**
**
** ASSEMBLY
**
*Assembly, name=Assembly
**
*Instance, name=PlateBendingTestCase-1, part=PlateBendingTestCase
*Node
      1,           0.,          20.,           0.
      2,           0.,          15.,           0.
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*Element, type=S8R
 1,  1,  2,  7,  6, 26, 27, 28, 29
 2,  2,  3,  8,  7, 30, 31, 32, 27
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*Nset, nset=Set-1, generate
  1,  65,   1
*Elset, elset=Set-1, generate
  1,  16,   1
** Section: SectionForBendingProblem
*Shell Section, elset=Set-1, material=BendingProblemMaterial
2., 5
*End Instance
**
*Nset, nset=Set-4, instance=PlateBendingTestCase-1
  1,  2,  3,  4,  5,  6
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*Elset, elset=Set-4, instance=PlateBendingTestCase-1
  1,  2,  3,  4,  5,  8,  9, 12, 13, 14, 15, 16
*Elset, elset=_Surf-1_SPOS, internal, instance=PlateBendingTestCase-1, generate
  1,  16,   1
*Surface, type=ELEMENT, name=Surf-1
_Surf-1_SPOS, SPOS
*End Assembly
**
** MATERIALS
**
*Material, name=BendingProblemMaterial
*Elastic
 2.9e+07, 0.3
** ----------------------------------------------------------------
**
** STEP: stepForBendingProblem
**
*Step, name=stepForBendingProblem, nlgeom=NO
This is a stem for bending problem
*Static
1., 1., 1e-05, 1.
**
** BOUNDARY CONDITIONS
**
** Name: FixedBCatEdges Type: Displacement/Rotation
*Boundary
Set-4, 1, 1
Set-4, 2, 2
Set-4, 3, 3
Set-4, 4, 4
Set-4, 5, 5
Set-4, 6, 6
**
** LOADS
**
** Name: AppliedPressure   Type: Pressure
*Dsload
Surf-1, P, 10.
**
** OUTPUT REQUESTS
**
*Restart, write, frequency=0
**
** FIELD OUTPUT: F-Output-2
**
*Output, field
*Node Output
U, UR, UT, V, VR, VT
*Element Output, directions=YES
ALPHA, ALPHAN, CS11, CTSHR, E, EE, ER, IE, LE, MISES, MISESMAX, MISESONLY, NE, PE, PEEQ, PEEQMAX
PEEQT, PEMAG, PEQC, PRESSONLY, PS, S, SALPHA, SE, SEE, SEP, SEPE, SPE, SSAVG, THE, TRIAX, TSHR
VE, VEEQ, VS
**
** FIELD OUTPUT: F-Output-1
**
*Output, field, variable=PRESELECT
**
** HISTORY OUTPUT: H-Output-1
**
*Output, history, variable=PRESELECT
*End Step
