*Heading
** Job name: TorsionTestCase Model name: Model-1
** Generated by: Abaqus/CAE 2016
*Preprint, echo=NO, model=NO, history=NO, contact=NO
**
** PARTS
**
*Part, name=TestCaseTorsion
*End Part
**
**
** ASSEMBLY
**
*Assembly, name=Assembly
**
*Instance, name=TestCaseTorsion-1, part=TestCaseTorsion
*Node
      1,           0.,          20.,           0.
      2,           0.,          15.,           0.
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*Element, type=S8R
 1,  1,  2,  7,  6, 26, 27, 28, 29
 2,  2,  3,  8,  7, 30, 31, 32, 27
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*Nset, nset=Set-1, generate
  1,  65,   1
*Elset, elset=Set-1, generate
  1,  16,   1
** Section: TorsionProblemSection
*Shell Section, elset=Set-1, material=MaterialForTorsionCase
2., 5
*End Instance
**
*Nset, nset=Set-6, instance=TestCaseTorsion-1
  1,  2,  3,  4,  5, 26, 30, 33, 36
*Elset, elset=Set-6, instance=TestCaseTorsion-1, generate
 1,  4,  1
*Nset, nset=Set-7, instance=TestCaseTorsion-1
 21,
*Nset, nset=Set-8, instance=TestCaseTorsion-1
 25,
*End Assembly
**
** MATERIALS
**
*Material, name=MaterialForTorsionCase
*Elastic
 2.9e+07, 0.3
** ----------------------------------------------------------------
**
** STEP: TorsionProblemStep
**
*Step, name=TorsionProblemStep, nlgeom=NO
*Static
1., 1., 1e-05, 1.
**
** BOUNDARY CONDITIONS
**
** Name: FixedEdge Type: Displacement/Rotation
*Boundary
Set-6, 1, 1
Set-6, 2, 2
Set-6, 3, 3
Set-6, 4, 4
Set-6, 5, 5
Set-6, 6, 6
**
** LOADS
**
** Name: NegetiveDirectionForce   Type: Concentrated force
*Cload
Set-8, 3, -200.
** Name: PositiveForce   Type: Concentrated force
*Cload
Set-7, 3, 200.
**
** OUTPUT REQUESTS
**
*Restart, write, frequency=0
**
** FIELD OUTPUT: F-Output-2
**
*Output, field
*Node Output
U, UR, UT, V, VR, VT
*Element Output, directions=YES
ALPHA, ALPHAN, CS11, CTSHR, E, EE, ER, IE, LE, MISES, MISESMAX, MISESONLY, NE, PE, PEEQ, PEEQMAX
PEEQT, PEMAG, PEQC, PRESSONLY, PS, S, SALPHA, SE, SEE, SEP, SEPE, SPE, SSAVG, THE, TRIAX, TSHR
VE, VEEQ, VS
**
** FIELD OUTPUT: F-Output-1
**
*Output, field, variable=PRESELECT
**
** HISTORY OUTPUT: H-Output-1
**
*Output, history, variable=PRESELECT
*End Step
